m := 0.5
c := 530
k := 25
s := 0.02
σ := 5.7*10^-8
tA := 300
tR := 600
n := 700
p := 700
i := 0 .. n
l(t) := s*(k*(t - tA) + σ*(t^4 - tA^4))
p1 := 500
tR2 := 0.9*tR
c1 := 800
tR3 := 0.8*tR
T(p, c, m, tR) :=
    i ← 0
    t ← tA
    T[0] ← tA
    h ← 1
    j ← 0
    while i < n
        T[i + 1] ← T[i] + (p*h - l(T[i]))/(c*m)
        j ← j - 1
        if T[i + 1] > tR
            h ← 0
            j ← 30
        if j ≤ 0
            h ← 1
        i ← i + 1
    T
m1 := 1
tR4 := 0.7*tR
tR5 := 0.75*tR
X1 := T(p, c, m, tR) = [
    300; 302.642; 305.277; 307.906; 310.529; 313.145; 315.755; 318.359; 320.957; 323.548
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]
X2 := T(p1, c, m, tR2)
X3 := T(p, c1, m, tR3)
X4 := T(p, c, m1, tR4)
X5 := T(p, c, m, tR5)
# [plot: X1[i], X2[i], X3[i], X4[i], X5[i] vs i]
