m := 0.5
c := 530
k := 25
s := 0.02
σ := 5.7*10^-8
tA := 300
tR := 6000
n := 700
x_0 := tA
l(t) := s*(k*(t - tA) + σ*(t^4 - tA^4))
h(t) :=
    if t ≥ tR
        0
    else
        1
p0 := 700
p1 := 500
D0(t, y) := [(p0*h(y[0]) - l(y[0]))/(c*m)]
c1 := 800
m1 := 1
D1(t, y) := [(p1*h(y[0]) - l(y[0]))/(c*m)]
Z[0] := rkfixed(x_0, 0, n, n, D0)
Z[1] := rkfixed(x_0, 0, n, n, D1)
D2(t, y) := [(p0*h(y[0]) - l(y[0]))/(c1*m)]
Z[2] := rkfixed(x_0, 0, n, n, D2)
D3(t, y) := [(p0*h(y[0]) - l(y[0]))/(c*m1)]
Z[3] := rkfixed(x_0, 0, n, n, D3)
Z = [
    [
        0, 300;
        1, 302.638;
        2, 305.271;
        3, 307.896;
        4, 310.516;
        5, 313.13;
        6, 315.737;
        7, 318.337;
        8, 320.932;
        9, 323.52
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    ];
    [
        0, 300;
        1, 301.885;
        2, 303.765;
        3, 305.64;
        4, 307.512;
        5, 309.378;
        6, 311.241;
        7, 313.098;
        8, 314.952;
        9, 316.801
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    ];
    [
        0, 300;
        1, 301.749;
        2, 303.495;
        3, 305.238;
        4, 306.978;
        5, 308.716;
        6, 310.451;
        7, 312.183;
        8, 313.912;
        9, 315.639
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    ];
    [
        0, 300;
        1, 301.32;
        2, 302.638;
        3, 303.955;
        4, 305.271;
        5, 306.584;
        6, 307.896;
        7, 309.207;
        8, 310.516;
        9, 311.824
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    ]
]
# [plot: Z[0][:, 1], Z[1][:, 1], Z[2][:, 1], Z[3][:, 1] vs Z[0][:, 0], Z[1][:, 0], Z[2][:, 0], Z[3][:, 0]]
