a := 4
b := 2
c := 3
d := 1
D(t, y) := [a*y[0] - (b*y[0])*y[1]; (d*y[0])*y[1] - c*y[1]]
x_1 := [2; 5]
x_2 := [5; 5]
x_3 := [5; 3]
x_4 := [3; 2]
x_5 := [2; 3]
x_6 := [4; 4]
Z_1 := rkfixed(x_1, 0, 2000, 100000, D)
Z_4 := rkfixed(x_6, 0, 2000, 100000, D)
Z_2 := rkfixed(x_2, 0, 2000, 100000, D)
Z_5 := rkfixed(x_5, 0, 2000, 100000, D)
Z_3 := rkfixed(x_3, 0, 2000, 100000, D)
Z_6 := rkfixed(x_4, 0, 1000, 100000, D)
n := 0 .. 1000
# [plot: Z_1[n, 2], Z_2[n, 2], Z_3[n, 2], Z_4[n, 2], Z_5[n, 2], Z_6[n, 2] vs Z_1[n, 1], Z_2[n, 1], Z_3[n, 1], Z_4[n, 1], Z_5[n, 1], Z_6[n, 1]]
Z_6 = [
    0, 3, 2;
    0.01, 3, 2;
    0.02, 3, 2;
    0.03, 3, 2;
    0.04, 3, 2;
    0.05, 3, 2;
    0.06, 3, 2;
    0.07, 3, 2;
    0.08, 3, 2;
    0.09, 3, 2;
    0.1, 3, 2;
    0.11, 3, 2
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]
# [plot: Z_6[n, 1], Z_6[n, 2] vs Z_6[n, 0]]
