m := 1
g := 9.80665
l := 1
v_0 := 2*sqrt(g*l)
φ_0 := π/2
a := l
k := 0.5
v_0 := 0
y := [v_0; φ_0]
w_0 := sqrt(g/l)
δ := 0.5
w_1 := π
k := δ*w_0
w_1 := w_0*0.8
J := m*l^2
k := 0.3
d^2/dt^2(phi) + g/l*sin(phi)
w_1 := 0
D(t, y) := [-w_0^2*y[1]*0 - 1*w_0^2*sin(y[1]) - k*y[0] + a*sin(w_1*t); y[0]]
Z := rkfixed(y, 0, 29.9, 2000, D)
Z = [
    0, 0, 1.5708;
    0.01495, -0.146281, 1.5697;
    0.0299, -0.291907, 1.56643
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]
i := 0 .. rows(Z) - 1
max(Z[:, 1]) = 3.49111
w_1 = 0
# [plot: Z[:, 2][i] vs Z[:, 0][i]]
z := max(l*sin(Z[:, 2])) = 1
# [plot: z vs w_1/w_0]
h := l - l*cos(Z[:, 1]) = [
    0; 0.01068; 0.0423032; 0.0939231; 0.164191; 0.251391; 0.353487; 0.468168; 0.592902; 0.724993
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]
# [plot: Z[:, 2][i] vs Z[:, 1][i]]
w := w_0*[0.1; 0.2; 0.3; 0.4; 0.5; 0.6; 0.7; 0.8; 0.9; 0.95; 0.97; 1; 1.02; 1.05; 1.1; 1.2; 1.3; 1.4; 1.5; 1.6; 1.7; 1.8; 1.9; 2; 2.3; 2.6; 3]
amax := max(l*sin(wr))  # error: Эта переменная не определена. Проверьте правильность установки обозначения.
n := rows(w) = 27
Q := rkfixed(y, 0, 10, 20, R)  # error: У {0} несколько определений. Необходимо указать надпись, чтобы выбрать требуемое определение.
wr :=
    ii ← 0
    while ii < n
        R(t, y) ← [-g/l*y[1]*0 - 1*w_0^2*sin(y[1]) - k*y[0] + a*sin(w[ii]*t); y[0]]
        Q ← rkfixed(y, 0, 50, 200, R)
        wr[ii] ← max(l*sin(Q[:, 2]))
        ii ← ii + 1
    wr
# [plot: wr vs w/w_0]
A := 1/sqrt((w_0^2 - w^2)^2 + 4*(δ^2*w^2)) = [0.102948; 0.105986; 0.111441; 0.120015; 0.132982; 0.152637; 0.183127; 0.231002; 0.295978; 0.320015; 0.323373; 0.31933; 0.310688; 0.290838; 0.249167; 0.174767; 0.126633; 0.0962912; 0.076176; 0.0621196; 0.0518565; 0.0440945; 0.0380549; 0.0332455; 0.0234287; 0.0175223; 0.012656]
φ := atan(2*δ*w/(w_0^2 - w^2))  # error: Невозможно вычислить выражение, поскольку оно делится на ноль.
δ := 0.1
A_r := 1/(2*δ*w_0) = 1.59665
ξ(t) := A*cos(w*t - φ)  # error: Эта переменная не определена. Проверьте правильность установки обозначения.
k := δ*w_0
w_1 := w_0*0.8 = 2.50525
z = 1
g := 9.80665
v_0 := 2*sqrt(g*l)
φ_0 := 0
a := l
k := 0.2
v_0 := π/2
y := [v_0; φ_0]
w_0 := sqrt(g/l)
w0 ← sqrt(g/l)
h ← 0.025
d ← 0.1
w ← w0*0.1
v ← π/24
phi ← 0
i ← 0
m ← l*sin(phi)
while i < n
    t ← h*(a*sin(w*i*h) - w0^2*sin(phi))
    phi ← phi + h*v
    v ← v + t
    i ← i + 1
    if (l*sin(phi) > m)
        m ← l*sin(phi)
m
= 0.0515733
δ := 0.5
n := 2000
h := 0.025
m := 20
R(t, y) := [-g/l*y[1]*0 - 1*w_0*sin(y[1]) - k*y[0] + a*sin(w[j]*t); y[0]]  # error: Эта переменная не определена. Проверьте правильность установки обозначения.
A[:, i][j] := A0/(m*sqrt((w0^2 - w[j]^2)^2 + 4*b[i]^2*w[j]^2))  # error: Требуется имя функции или переменной.
t := 0, 0.1 .. 40 = [
    0; 0.1; 0.2; 0.3; 0.4; 0.5; 0.6; 0.7; 0.8; 0.9
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]
m := 1
d := 0.1
w0 := sqrt(g/l)
w := w0
f := 0
l := 1
A0 := l
b := d*w0
X(t) := A0*e^(-b*t)*cos(w*t + f)
# [plot: X(t[i]) vs t[i]]
m1 := 0.9
m2 := 1.1
n := 1000
m := 3
step := m/n = 0.003
k1 := 0, step .. 0.99 = [
    0; 0.003; 0.006; 0.009; 0.012; 0.015; 0.018; 0.021; 0.024; 0.027
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]
k2 := 0., 0.0015 .. 1.9 = [
    0; 0.0015; 0.003; 0.0045; 0.006; 0.0075; 0.009; 0.0105; 0.012; 0.0135
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]
k2 := k2 + 1.04
k := 0, step .. m = [
    0; 0.003; 0.006; 0.009; 0.012; 0.015; 0.018; 0.021; 0.024; 0.027
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]
w1 := w0*k1 = [
    0; 0.00939467; 0.0187893; 0.028184; 0.0375787; 0.0469734; 0.056368; 0.0657627; 0.0751574; 0.084552
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]
w2 := w0*k2 = [
    3.25682; 3.26152; 3.26621; 3.27091; 3.27561; 3.28031; 3.285; 3.2897; 3.2944; 3.2991
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]
z(t) := 3*t/m
z(k) = [
    0; 0.003; 0.006; 0.009; 0.012; 0.015; 0.018; 0.021; 0.024; 0.027
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]
d1 := 0, 0.01 .. 10 = [
    0; 0.01; 0.02; 0.03; 0.04; 0.05; 0.06; 0.07; 0.08; 0.09
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]
d2 := 0, 0.01 .. 10 = [
    0; 0.01; 0.02; 0.03; 0.04; 0.05; 0.06; 0.07; 0.08; 0.09
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]
w := w0*k = [
    0; 0.00939467; 0.0187893; 0.028184; 0.0375787; 0.0469734; 0.056368; 0.0657627; 0.0751574; 0.084552
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]
b1 := w0*d1
b2 := w0*d2
d := 0, 0.01 .. 10 = [
    0; 0.01; 0.02; 0.03; 0.04; 0.05; 0.06; 0.07; 0.08; 0.09
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]
b := w0*d
A_1 :=
    j ← 0
    while j ≤ 320
        A[j] ← A0/(m*sqrt((w0^2 - w1[j]^2)^2 + 4*b1[0]^2*w1[j]^2))
        j ← j + 1
    A
A_2 :=
    j ← 0
    while j ≤ n
        A[j] ← A0/(m*sqrt((w0^2 - w2[j]^2)^2 + 4*b2[0]^2*w2[j]^2))
        j ← j + 1
    A
A_3 :=
    j ← 0
    while j ≤ n
        A[j] ← A0/(m*sqrt((w0^2 - w[j]^2)^2 + 4*b[5]^2*w[j]^2))
        j ← j + 1
    A
A_4 :=
    j ← 0
    while j ≤ n
        A[j] ← A0/(m*sqrt((w0^2 - w[j]^2)^2 + 4*b[10]^2*w[j]^2))
        j ← j + 1
    A
A_5 :=
    j ← 0
    while j ≤ n
        A[j] ← A0/(m*sqrt((w0^2 - w[j]^2)^2 + 4*b[15]^2*w[j]^2))
        j ← j + 1
    A
A_6 :=
    j ← 0
    while j ≤ n
        A[j] ← A0/(m*sqrt((w0^2 - w[j]^2)^2 + 4*b[20]^2*w[j]^2))
        j ← j + 1
    A
A_7 :=
    j ← 0
    while j ≤ n
        A[j] ← A0/(m*sqrt((w0^2 - w[j]^2)^2 + 4*b[30]^2*w[j]^2))
        j ← j + 1
    A
A_8 :=
    j ← 0
    while j ≤ n
        A[j] ← A0/(m*sqrt((w0^2 - w[j]^2)^2 + 4*b[40]^2*w[j]^2))
        j ← j + 1
    A
A_9 :=
    j ← 0
    while j ≤ n
        A[j] ← A0/(m*sqrt((w0^2 - w[j]^2)^2 + 4*b[50]^2*w[j]^2))
        j ← j + 1
    A
A_10 :=
    j ← 0
    while j ≤ n
        A[j] ← A0/(m*sqrt((w0^2 - w[j]^2)^2 + 4*b[100]^2*w[j]^2))
        j ← j + 1
    A
A_11 :=
    j ← 0
    while j ≤ n
        A[j] ← A0/(m*sqrt((w0^2 - w[j]^2)^2 + 4*b[300]^2*w[j]^2))
        j ← j + 1
    A
A_12 :=
    j ← 0
    while j ≤ n
        A[j] ← A0/(m*sqrt((w0^2 - w[j]^2)^2 + 4*b[1000]^2*w[j]^2))
        j ← j + 1
    A
# [plot: A_1[i], A_2[i], A_3[i], A_4[i], A_5[i], A_6[i], A_7[i], A_8[i], A_9[i], A_10[i], A_11[i], A_12[i] vs w1[i]/w0, w2[i]/w0, w[i]/w0]
