m := 1
g := 9.80665
l := 1
v_0 := 2*sqrt(g*l)
a := l
v_0 := 0
w_0 := sqrt(g/l)
δ := 0.5
w_1 := π
k := δ*w_0
w_1 := w_0*0.8
J := m*l^2
k := 0.3
a := 0
k := 0
w_1 := 0
d^2/dt^2(phi) + g/l*sin(phi)
φ_0 := π/180*80
y := [v_0; φ_0]
D1(t, y) := [-w_0^2*sin(y[1]) - k*y[0] + a*sin(w_1*t); y[0]]
Z1 := rkfixed(y, 0, 9.9, 2000, D1)
w_1 = 0
i := 0 .. rows(Z1) - 1
D2(t, y) := [-w_0^2*y[1] - k*y[0]; y[0]]
Z2 := rkfixed(y, 0, 9.9, 2000, D2)
# [plot: Z1[:, 2] vs Z1[:, 1]]
# [plot: Z2[:, 2], Z1[:, 2] vs Z2[:, 0], Z1[:, 0]]
