x := 100
y := 200
Ω := π/(12*60*60)
u := 0.9
v := 0.5
z := [x; y; u; v]
d(x, y) := sqrt(x^2 + y^2)
D(t, z) := [z[2]; z[3]; 2*Ω*z[3]; -2*Ω*z[2]]
Z := rkfixed(z, 0, 50000, 5000, D) = [
    0, 100, 200, 0.9, 0.5;
    10, 109.004, 204.993, 0.900726, 0.49869;
    20, 118.015, 209.974, 0.901451, 0.49738;
    30, 127.033, 214.941, 0.902173, 0.496068;
    40, 136.058, 219.895, 0.902894, 0.494756;
    50, 145.091, 224.836, 0.903612, 0.493442;
    60, 154.13, 229.764, 0.904329, 0.492127;
    70, 163.177, 234.679, 0.905044, 0.490811
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]
i := 0 .. rows(Z) - 1
# [plot: Z[:, 2][i] vs Z[:, 1][i]]
# [plot: Z[:, 3][i]^2 + Z[:, 4][i]^2 - u^2 - v^2 vs Z[:, 0][i]]
max(Z[:, 3]^2 + Z[:, 4]^2) - u^2 - v^2 = 3.55271e-15
min(Z[:, 3]^2 + Z[:, 4]^2) - u^2 - v^2 = -7.32747e-15
