d := 0.3
n := 1000
L := 1
l := 500
ψ(x, y) := sin(2*π*x)*sin(π*y)
k := 50
t := 0.1
rand := 0.01
i := 0 .. n - 1
s := L/l
u(x, y) := -π*sin(2*π*x)*cos(π*y)
x[i] := rnd(L)
y[i] := rnd(L)
v(x, y) := 2*π*cos(2*π*x)*sin(π*y)
(y[1] - L/2)/|y[1] - L/2| = -1
M[:, 0] := x
M[:, 1] := y
C(x, y) := (L/2 - y)/|y - L/2|
D(t, z) := [u(z[0], z[1]); v(z[0], z[1])]
M = [
    0.440641, 0.505147;
    0.605144, 0.0305942;
    0.660215, 0.498159;
    0.59591, 0.874053;
    0.40421, 0.44284;
    0.99321, 0.316822;
    0.611091, 0.714685;
    0.419803, 0.727605;
    0.477018, 0.535199;
    0.958212, 0.23017
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]
C(x, y) := atan((y - 0.5)/d)
C[i] := C(M[:, 0][i], M[:, 1][i]) = [
    -0.983732; -0.906748; 0.674538; -1.02646; 0.989306; 0.696425; 0.536173; 0.497694; -0.960394; 0.877853
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]
T := transpose(M) = [
    0.440641, 0.605144, 0.660215, 0.59591, 0.40421, 0.99321, 0.611091, 0.419803, 0.477018, 0.958212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;
    0.505147, 0.0305942, 0.498159, 0.874053, 0.44284, 0.316822, 0.714685, 0.727605, 0.535199, 0.23017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]
z := T[:, 1] = [0.605144; 0.0305942]
Z :=
    i ← 0
    while i < n
        Q ← rkfixed(T[:, i], 0, t, k, D)
        Z[i, 0] ← Q[:, 1][k]
        Z[i, 1] ← Q[:, 2][k]
        Z[i, 2] ← C[i]
        i ← i + 1
    Z
    = [
        0.000229325, 0.323109, -0.983732;
        0.0551647, 0.452204, -0.906748;
        0.592775, 0.235579, 0.674538;
        0.0849308, 0.00701282, -1.02646;
        0.571832, 0.909412, 0.989306
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    ]
# loess, interp
# [contour plot: Z]
