d := 0.3
n := 20000
L := 1
l := 500
ψ(x, y) := sin(2*π*x)*sin(π*y)
k := 50
t := 0.99
rand := 0.01
i := 0 .. n - 1
s := L/l
u(x, y) := -π*sin(2*π*x)*cos(π*y)
x[i] := rnd(L)
y[i] := rnd(L)
v(x, y) := 2*π*cos(2*π*x)*sin(π*y)
(y[1] - L/2)/|y[1] - L/2| = 1
M[:, 0] := x
M[:, 1] := y
C(x, y) := (L/2 - y)/|y - L/2|
D(t, z) := [u(z[0], z[1]); v(z[0], z[1])]
M = [
    0.00126842, 0.12718;
    0.193323, 0.547498
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]
C(x, y) := atan((y - 0.5)/d)
C[i] := C(M[:, 0][i], M[:, 1][i]) = [
    -0.893209; 0.157022; 0.910985; -0.756239
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]
T := transpose(M) = [
    0.00126842, 0.193323, 0.585006, 0.350308, 0.822838, 0.174129;
    0.12718, 0.547498, 0.886696, 0.217004, 0.11335, 0.324557
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]
z := T[:, 1] = [0.193323; 0.547498]
Z :=
    i ← 0
    while i < n
        Q ← rkfixed(T[:, i], 0, t, k, D)
        X[i] ← Q[:, 1][k]
        Y[i] ← Q[:, 2][k]
        i ← i + 1
    Z[0] ← X
    Z[1] ← Y
    Z
    = [
        [
            0.490794; 0.192683; 0.954868; 0.095057; 0.65617; 0.349722; 0.639165; 0.275959; 0.352849; 0.0745202
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        ];
        [
            0.0171038; 0.543851; 0.218748; 0.360543; 0.122831; 0.384371; 0.011063; 0.644446; 0.770168; 0.394632
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        ]
    ]
# loess, interp
Z[1][2] = 0.218748
A_0 :=
    i ← 0
    j ← 0
    while i < n
        if C[i] > 0.8
            X[j] ← Z[0][i]
            Y[j] ← Z[1][i]
            j ← j + 1
        i ← i + 1
    W[0] ← X
    W[1] ← Y
    W
A_1 :=
    i ← 0
    j ← 0
    while i < n
        if C[i] ≤ 0.8 and C[i] > 0.65
            X[j] ← Z[0][i]
            Y[j] ← Z[1][i]
            j ← j + 1
        i ← i + 1
    W[0] ← X
    W[1] ← Y
    W
A_2 :=
    i ← 0
    j ← 0
    while i < n
        if C[i] ≤ 0.65 and C[i] > 0.45
            X[j] ← Z[0][i]
            Y[j] ← Z[1][i]
            j ← j + 1
        i ← i + 1
    W[0] ← X
    W[1] ← Y
    W
A_3 :=
    i ← 0
    j ← 0
    while i < n
        if C[i] ≤ 0.45 and C[i] > 0.2
            X[j] ← Z[0][i]
            Y[j] ← Z[1][i]
            j ← j + 1
        i ← i + 1
    W[0] ← X
    W[1] ← Y
    W
A_4 :=
    i ← 0
    j ← 0
    while i < n
        if C[i] ≤ 0.2 and C[i] > -0.2
            X[j] ← Z[0][i]
            Y[j] ← Z[1][i]
            j ← j + 1
        i ← i + 1
    W[0] ← X
    W[1] ← Y
    W
A_5 :=
    i ← 0
    j ← 0
    while i < n
        if C[i] ≤ -0.2 and C[i] > -0.45
            X[j] ← Z[0][i]
            Y[j] ← Z[1][i]
            j ← j + 1
        i ← i + 1
    W[0] ← X
    W[1] ← Y
    W
A_6 :=
    i ← 0
    j ← 0
    while i < n
        if C[i] ≤ -0.45 and C[i] > -0.65
            X[j] ← Z[0][i]
            Y[j] ← Z[1][i]
            j ← j + 1
        i ← i + 1
    W[0] ← X
    W[1] ← Y
    W
A_7 :=
    i ← 0
    j ← 0
    while i < n
        if C[i] ≤ -0.65 and C[i] > -0.8
            X[j] ← Z[0][i]
            Y[j] ← Z[1][i]
            j ← j + 1
        i ← i + 1
    W[0] ← X
    W[1] ← Y
    W
A_8 :=
    i ← 0
    j ← 0
    while i < n
        if C[i] ≤ -0.8
            X[j] ← Z[0][i]
            Y[j] ← Z[1][i]
            j ← j + 1
        i ← i + 1
    W[0] ← X
    W[1] ← Y
    W
max(Z[0]) = 0.999982
f(i, j) := 0
# [plot: A_0[1], A_1[1], A_2[1], A_3[1], A_4[1], A_5[1], A_6[1], A_7[1], A_8[1] vs A_0[0], A_1[0], A_2[0], A_3[0], A_4[0], A_5[0], A_6[0], A_7[0], A_8[0]]
min(Z[0]) = 0.000223597
E :=
    i ← 0
    E ← matrix(l, l, f)
    k ← matrix(l, l, f)
    while i < n
        x ← floor(Z[0][i]/s)
        y ← floor(Z[1][i]/s)
        if x < 0
            x ← 0
        if y < 0
            y ← 0
        if x > l - 1
            x ← l - 1
        if y > l - 1
            y ← l - 1
        E[:, x][y] ← E[:, x][y] + C[i]
        k[:, x][y] ← k[:, x][y] + 1
        if x > 3
            xs ← x - 4
        else
            xs ← 0
        if y > 3
            ys ← y - 4
        else
            ys ← 0
        if x < l - 5
            xe ← x + 6
        else
            xe ← l
        if y < l - 5
            ye ← y + 6
        else
            ye ← l
        xx ← xs
        while xx < xe
            yy ← ys
            while yy < ye
                kf ← 1/max(sqrt((x - Z[0][i]/s)^2 + (y - Z[1][i]/s)^2), 1)^2
                E[:, xx][yy] ← E[:, xx][yy] + kf*C[i]
                k[:, xx][yy] ← k[:, xx][yy] + kf
                yy ← yy + 1
            xx ← xx + 1
        i ← i + 1
    i ← 0
    while i < l
        j ← 0
        while j < l
            E[:, i][j] ← E[:, i][j]/max(k[:, i][j], 0.01)
            j ← j + 1
        i ← i + 1
    E
MA := max(E) = 1.02992
MI := min(E) = -1.02911
E = [
    0, 0, 0, 0, 0, 1.02664;
    0, 0, 0, 0, 0, 1.02664;
    0, 0, 0, 0, 0, 1.02664;
    1.02992, 1.02992, 1.02992, 1.02992, 1.02992, 1.02773;
    1.02992, 1.02992, 1.02992, 1.02992, 1.02992, 1.02773;
    1.02992, 1.02992, 1.02992, 1.02992, 1.02992, 1.02773;
    1.02992, 1.02992, 1.02992, 1.02992, 1.00464, 1.01113;
    1.02983, 1.02983, 1.02986, 1.02983, 1.01301, 1.01579
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]
R :=
    i ← 0
    R ← matrix(l, l, f)
    while i < l
        j ← 0
        while j < l
            if E[:, i][j] ≥ L/2
                R[:, i][j] ← 255
            else if E[:, i][j] < 0
                0
            else
                R[:, i][j] ← floor(510/MA*E[:, i][j])
            j ← j + 1
        i ← i + 1
    R
G :=
    i ← 0
    G ← matrix(l, l, f)
    while i < l
        j ← 0
        while j < l
            if |E[:, i][j]| ≥ L
                G[:, i][j] ← 0
            else if E[:, i][j] ≤ -L/2
                G[:, i][j] ← floor(510*(E[:, i][j] + L))
            else if E[:, i][j] ≥ L/2
                G[:, i][j] ← -floor(510*(E[:, i][j] - L))
            else
                G[:, i][j] ← 255
            j ← j + 1
        i ← i + 1
    G
B :=
    i ← 0
    B ← matrix(l, l, f)
    while i < l
        j ← 0
        while j < l
            if E[:, i][j] ≤ -L/2
                B[:, i][j] ← 255
            else if E[:, i][j] > 0
                0
            else
                B[:, i][j] ← floor(510/MI*E[:, i][j])
            j ← j + 1
        i ← i + 1
    B
RGB := augment(R, G, B)
W :=
    i ← 0
    while i < n
        W[i, 0] ← Z[0][i]
        W[i, 1] ← Z[1][i]
        W[i, 2] ← C[i]
        i ← i + 1
    W
Wrgb := WRITERGB("assets6v2/rgb099.bmp", RGB)
