d := 0.3
n := 20000
L := 1
l := 100
ψ(x, y) := sin(2*π*x)*sin(π*y)
k := 50
t := 0.04
rand := 0.01
i := 0 .. n - 1
s := L/l
u(x, y) := -π*sin(2*π*x)*cos(π*y)
x[i] := rnd(L)
y[i] := rnd(L)
v(x, y) := 2*π*cos(2*π*x)*sin(π*y)
(y[1] - L/2)/|y[1] - L/2| = 1
M[:, 0] := x
M[:, 1] := y
C(x, y) := (L/2 - y)/|y - L/2|
D(t, z) := [u(z[0], z[1]); v(z[0], z[1])]
M = [
    0.12718, 0.440641;
    0.547498, 0.605144
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]
C(x, y) := atan((y - 0.5)/d)
C[i] := C(M[:, 0][i], M[:, 1][i]) = [
    -0.19534; 0.337102; 0.490515; 0.30943
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]
T := transpose(M) = [
    0.12718, 0.547498, 0.886696, 0.217004, 0.11335, 0.324557;
    0.440641, 0.605144, 0.660215, 0.59591, 0.40421, 0.99321
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]
z := T[:, 1] = [0.547498; 0.605144]
Z :=
    i ← 0
    while i < n
        Q ← rkfixed(T[:, i], 0, t, k, D)
        X[i] ← Q[:, 1][k]
        Y[i] ← Q[:, 2][k]
        i ← i + 1
    Z[0] ← X
    Z[1] ← Y
    Z
    = [
        [
            0.000663252; 0.224935; 0.543658; 0.252974; 0.905329; 0.138157; 0.831835; 0.3264; 0.131279; 0.0867569
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        ];
        [
            0.267042; 0.612254; 0.772707; 0.170047; 0.188469; 0.459558; 0.00973638; 0.508347; 0.744953; 0.307606
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        ]
    ]
# loess, interp
Z[1][2] = 0.772707
A_0 :=
    i ← 0
    j ← 0
    while i < n
        if C[i] > 0.8
            X[j] ← Z[0][i]
            Y[j] ← Z[1][i]
            j ← j + 1
        i ← i + 1
    W[0] ← X
    W[1] ← Y
    W
A_1 :=
    i ← 0
    j ← 0
    while i < n
        if C[i] ≤ 0.8 and C[i] > 0.65
            X[j] ← Z[0][i]
            Y[j] ← Z[1][i]
            j ← j + 1
        i ← i + 1
    W[0] ← X
    W[1] ← Y
    W
A_2 :=
    i ← 0
    j ← 0
    while i < n
        if C[i] ≤ 0.65 and C[i] > 0.45
            X[j] ← Z[0][i]
            Y[j] ← Z[1][i]
            j ← j + 1
        i ← i + 1
    W[0] ← X
    W[1] ← Y
    W
A_3 :=
    i ← 0
    j ← 0
    while i < n
        if C[i] ≤ 0.45 and C[i] > 0.2
            X[j] ← Z[0][i]
            Y[j] ← Z[1][i]
            j ← j + 1
        i ← i + 1
    W[0] ← X
    W[1] ← Y
    W
A_4 :=
    i ← 0
    j ← 0
    while i < n
        if C[i] ≤ 0.2 and C[i] > -0.2
            X[j] ← Z[0][i]
            Y[j] ← Z[1][i]
            j ← j + 1
        i ← i + 1
    W[0] ← X
    W[1] ← Y
    W
A_5 :=
    i ← 0
    j ← 0
    while i < n
        if C[i] ≤ -0.2 and C[i] > -0.45
            X[j] ← Z[0][i]
            Y[j] ← Z[1][i]
            j ← j + 1
        i ← i + 1
    W[0] ← X
    W[1] ← Y
    W
A_6 :=
    i ← 0
    j ← 0
    while i < n
        if C[i] ≤ -0.45 and C[i] > -0.65
            X[j] ← Z[0][i]
            Y[j] ← Z[1][i]
            j ← j + 1
        i ← i + 1
    W[0] ← X
    W[1] ← Y
    W
A_7 :=
    i ← 0
    j ← 0
    while i < n
        if C[i] ≤ -0.65 and C[i] > -0.8
            X[j] ← Z[0][i]
            Y[j] ← Z[1][i]
            j ← j + 1
        i ← i + 1
    W[0] ← X
    W[1] ← Y
    W
A_8 :=
    i ← 0
    j ← 0
    while i < n
        if C[i] ≤ -0.8
            X[j] ← Z[0][i]
            Y[j] ← Z[1][i]
            j ← j + 1
        i ← i + 1
    W[0] ← X
    W[1] ← Y
    W
max(Z[0]) = 0.999929
f(i, j) := 0
# [plot: A_0[1], A_1[1], A_2[1], A_3[1], A_4[1], A_5[1], A_6[1], A_7[1], A_8[1] vs A_0[0], A_1[0], A_2[0], A_3[0], A_4[0], A_5[0], A_6[0], A_7[0], A_8[0]]
min(Z[0]) = 3.21093e-5
E :=
    i ← 0
    E ← matrix(l, l, f)
    k ← matrix(l, l, f)
    while i < n
        x ← floor(Z[0][i]/s)
        y ← floor(Z[1][i]/s)
        if x < 0
            x ← 0
        if y < 0
            y ← 0
        if x > l - 1
            x ← l - 1
        if y > l - 1
            y ← l - 1
        E[:, x][y] ← E[:, x][y] + C[i]
        k[:, x][y] ← k[:, x][y] + 1
        if x ≠ 0
            xs ← 1
        else
            xs ← 0
        if y ≠ 0
            ys ← 1
        else
            ys ← 0
        if x ≠ l - 1
            xe ← 1
        else
            xe ← 0
        if y ≠ l - 1
            ye ← 1
        else
            ye ← 0
        xx ← x - xs
        while xx < x + 1 + xe
            yy ← y - ys
            while yy < y + 1 + ye
                E[:, xx][yy] ← E[:, xx][yy] + C[i]/2
                k[:, xx][yy] ← k[:, xx][yy] + 1/2
                yy ← yy + 1
            xx ← xx + 1
        i ← i + 1
    i ← 0
    while i < l
        j ← 0
        while j < l
            E[:, i][j] ← E[:, i][j]/max(k[:, i][j], 1)
            j ← j + 1
        i ← i + 1
    E
MA := max(E) = 1.02815
MI := min(E) = -1.0283
E = [
    -1.02783, -1.02756, -1.0283, -1.02701, -1.02567, -1.02688;
    -1.02567, -1.02534, -1.02377, -1.0233, -1.02262, -1.02316;
    -1.01968, -1.01952, -1.01957, -1.01992, -1.01985, -1.01967;
    -1.01542, -1.01514, -1.01597, -1.01572, -1.01515, -1.01338;
    -1.01228, -1.01172, -1.01104, -1.01091, -1.00977, -1.00817;
    -1.00821, -1.00751, -1.00675, -1.00577, -1.00451, -1.00405;
    -1.00373, -1.00318, -1.00258, -1.00242, -1.00002, -0.998073;
    -0.998753, -0.998488, -0.998173, -0.997706, -0.994866, -0.993654
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]
R :=
    i ← 0
    R ← matrix(l, l, f)
    while i < l
        j ← 0
        while j < l
            if E[:, i][j] ≥ L/2
                R[:, i][j] ← 255
            else if E[:, i][j] < 0
                0
            else
                R[:, i][j] ← floor(510/MA*E[:, i][j])
            j ← j + 1
        i ← i + 1
    R
G :=
    i ← 0
    G ← matrix(l, l, f)
    while i < l
        j ← 0
        while j < l
            if |E[:, i][j]| ≥ L
                G[:, i][j] ← 0
            else if E[:, i][j] ≤ -L/2
                G[:, i][j] ← floor(510*(E[:, i][j] + L))
            else if E[:, i][j] ≥ L/2
                G[:, i][j] ← -floor(510*(E[:, i][j] - L))
            else
                G[:, i][j] ← 255
            j ← j + 1
        i ← i + 1
    G
B :=
    i ← 0
    B ← matrix(l, l, f)
    while i < l
        j ← 0
        while j < l
            if E[:, i][j] ≤ -L/2
                B[:, i][j] ← 255
            else if E[:, i][j] > 0
                0
            else
                B[:, i][j] ← floor(510/MI*E[:, i][j])
            j ← j + 1
        i ← i + 1
    B
RGB := augment(R, G, B) = [
    0, 0, 0, 0, 0, 0;
    0, 0, 0, 0, 0, 0;
    0, 0, 0, 0, 0, 0;
    0, 0, 0, 0, 0, 0;
    0, 0, 0, 0, 0, 0;
    0, 0, 0, 0, 0, 0;
    0, 0, 0, 0, 0, 0
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]
Wrgb := WRITERGB("assets6/rgb004.bmp", RGB)
