m := 1
g := 9.80665
l := 1
v_0 := 2*sqrt(g*l)
φ := 0
a := l
k := 0.2
v_0 := π/2
k := k
y := [v_0; φ]
w_0 := sqrt(g/l)
δ := 0.5
a := δ*w_0 = 1.56578
w_1 := π/0.5
w_1 := w_1*1
J := m*l^2
d^2/dt^2(phi) + g/l*sin(phi)
D(t, y) := [-w_0*y[1]*0 - 1*w_0^2*sin(y[1]) - k*y[0] + a*sin(w_1*t); y[0]]
Z := rkfixed(y, 0, 45, 2000, D)
Z = [
    0, 1.5708, 0;
    0.0225, 1.56234, 0.035253;
    0.045, 1.5511, 0.0702844;
    0.0675, 1.53701, 0.105031
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]
i := 0 .. rows(Z) - 1
max(Z[:, 1]) = 1.5708
# [plot: Z[:, 2][i] vs Z[:, 0][i]]
z := max(l*sin(Z[:, 2])) = 0.561146
# [plot: Z[:, 2][i] vs Z[:, 1][i]]
# [plot: z vs w_1/w_0]
h := l - l*cos(Z[:, 1]) = [
    1; 0.991543; 0.980305; 0.966222; 0.949166; 0.928942; 0.905311; 0.877995; 0.846697; 0.811127
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]
t := 0 .. 1000 = [
    0; 1; 2; 3; 4; 5; 6; 7; 8; 9
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]
f(t) := 0.001*t
A := f(t)
j := 0 .. 1000
R(t, y) := [-g/l*y[1]*0 - 1*w_0*sin(y[1]) - k*y[0] + A[1]*sin(w_1*t); y[0]]
Q := rkfixed(y, 0, 45, 2000, R) = [
    0, 1.5708, 0;
    0.0225, 1.5625, 0.0352542;
    0.045, 1.55178, 0.0702945;
    0.0675, 1.53866, 0.105066;
    0.09, 1.52319, 0.139517;
    0.1125, 1.5054, 0.173593;
    0.135, 1.48535, 0.207243;
    0.1575, 1.46309, 0.240417
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]
